TwoParCalibrationStudy LeftCal1Shoulder(
  BodyModelRef = Main.HumanModel.BodyModel,
Side = Left,
SHOULDER = On
) = {
  nStep = NumElemOf(ShoulderPositions);

  MuscleArr = ObjSearch(
  &..BodyModel.Left.ShoulderArm.Muscles,
  {
    "DeltoideusAnterior.*",
    "DeltoideusLateral.*",
    "DeltoideusPosterior.*",
    "Infraspinatus.*",
    "LatissimusDorsi.*",
    "LevatorScapulae.*",
    "PectoralisMajorClavicular.*",
    "PectoralisMajorThoracic.*",
    "PectoralisMinor.*",
    "SerratusAnterior.*",
    "Subscapularis.*",
    "Supraspinatus.*",
  },
  "AnyMuscle"
  );

  ShoulderPositions = flattenptr(&.RangeOfMotion.Left.ShoulderArm.Shoulder.ActiveRoM);
};

TwoParCalibrationStudy LeftCal2Elbow(
  BodyModelRef = Main.HumanModel.BodyModel,
  Side = Left,
  ELBOWFLEXION = On
) = {
  nStep = NumElemOf(ElbowFlexionPositions);

  MuscleArr = ObjSearch(
  &..BodyModel.Left.ShoulderArm.Muscles,
  {
    "Anoconeus.*",
    "BicepsBrachii.*",
    "Brachialis.*",
    "Brachioradialis.*",
    "Coracobrachialis.*",
    "Triceps.*",
  },
  "AnyMuscle"
  );

  ElbowFlexionPositions = flattenptr(&.RangeOfMotion.Left.ShoulderArm.Elbow.ActiveRoM);
};
