TwoParCalibrationStudy RightCal1Shoulder(
  BodyModelRef=Main.HumanModel.BodyModel,
  Side=Right,
  SHOULDER = On,
) = {
  nStep = NumElemOf(ShoulderPositions);

  MuscleArr = ObjSearch(
    &..BodyModel.Right.ShoulderArm.Muscles,
    {
      "DeltoideusAnterior.*",
      "DeltoideusLateral.*",
      "DeltoideusPosterior.*",
      "Infraspinatus.*",
      "LatissimusDorsi.*",
      "LevatorScapulae.*",
      "PectoralisMajorClavicular.*",
      "PectoralisMajorThoracic.*",
      "PectoralisMinor.*",
      "SerratusAnterior.*",
      "Subscapularis.*",
      "Supraspinatus.*",
    },
    "AnyMuscle"
  );

  ShoulderPositions = flattenptr(&.RangeOfMotion.Right.ShoulderArm.Shoulder.ActiveRoM);
};
