//define = (
//   [
//    {'BM_LEG_MODEL':'_LEG_MODEL_TLEM1_'},
//    {'BM_LEG_MODEL':'_LEG_MODEL_TLEM2_'},
//    {'BM_LEG_MODEL':'_LEG_MODEL_LEG_'},
//   ],
//   [
//    {'BM_CALIBRATION_TYPE':'1'},
//    {'BM_CALIBRATION_TYPE':'2'},
//    {'BM_CALIBRATION_TYPE':'3'},
//   ]
//)
//ignore_errors = ['Currently, no room for tendon']
//fatal_warnings = [
//    "Penetration of surface",
//    "The tendon/fiber length was calibrated but with issues",
//]

#include "libdef.any"

#ifndef TEST_NAME
#define BM_LEG_MODEL 2
#define BM_CALIBRATION_TYPE 3
#define TEST_NAME "test_calibration_lowerbody.any_1"
#endif


#define BM_SCALING _SCALING_NONE_
// comment
#define BM_LEG_TRUNK_INTERFACE _MORPH_TRUNK_TO_LEG_

#define BM_LEG_MUSCLES_RIGHT _MUSCLES_3E_HILL_

#define BM_LEG_MUSCLES_LEFT _MUSCLES_3E_HILL_
#define BM_LEG_LEFT ON
#define BM_ARM_RIGHT OFF
#define BM_ARM_LEFT OFF

#if BM_CALIBRATION_TYPE == 3
#define BM_MANNEQUIN_DRIVER_HIP_FLEXION_RIGHT OFF
#endif


Main =
{

  #include "<ANYBODY_PATH_BODY>/HumanModel.any"

  AnyOperation& RunTest = Main.HumanModel.Calibration.CalibrationSequence;

  #if BM_CALIBRATION_TYPE == 3
  AnyBodyStudy PostCalibrationStudy = {
    nStep = 100;
    Gravity = {0, 0, 0};
    InverseDynamics.Criterion.UpperBoundOnOff = Off;
    AnyFolder &Model = Main.HumanModel.BodyModelWithDefaultDrivers;

    AnyFixedRefFrame ground = {
      AnyRefNode node = {
        ARel = Main.HumanModel.BodyModel.Trunk.Segments.PelvisSeg.Axes0;
        sRel = Main.HumanModel.BodyModel.Trunk.Segments.PelvisSeg.r0;
      };
    };

    AnyKinEq ThoraxFix = {
      AnyKinMeasure& PelvisThoraxExtension = Main.HumanModel.BodyModel.Interface.Trunk.PelvisThoraxExtension;
      AnyKinMeasure& PelvisThoraxLateralBending = Main.HumanModel.BodyModel.Interface.Trunk.PelvisThoraxLateralBending;
      AnyKinMeasure& PelvisThoraxRotation = Main.HumanModel.BodyModel.Interface.Trunk.PelvisThoraxRotation;
    };

    AnyKinEq PelvisFix = {
      AnyKinLinear Lin = {
        AnyRefFrame &ground = ..ground.node;
        AnyRefFrame &Pelvis = Main.HumanModel.BodyModel.Trunk.Segments.PelvisSeg;
      };
      AnyKinRotational Rot = {
        Type = RotAxesAngles;
        AnyRefFrame &ground = ..ground.node;
        AnyRefFrame &Pelvis = Main.HumanModel.BodyModel.Trunk.Segments.PelvisSeg;
      };
    };

    AnyKinEqInterPolDriver Hip = {
      AnyKinMeasure &measure = Main.HumanModel.BodyModel.Interface.Right.HipFlexion;
      Type = PiecewiseLinear;
      T = linspace(0,1,.nStep);
      Data = {
        linspace(
        Main.HumanModel.Calibration.RangeOfMotion.Right.Leg.Hip.MaxExtensionAngle,
        Main.HumanModel.Calibration.RangeOfMotion.Right.Leg.Hip.MaxFlexionAngle,
        .nStep
        ) * pi/180
      };
      Reaction.Type = {Off};
    };
  };
  #endif
};


/*

# Test Documentation:

The test framework pytest is used to run tests.

Test files are identified by prefixing `test_` to the file names. Such files
will be collected automatically by the Pytest framework.

To run the test type the following at the command prompt:

> pytest


## Test specifications

The first part of the `test_xxx.any` can include specifications for the test framework.
Things such as define and part statements or certain errors to ignore.

The specification section must be commented with //. The test will execute that part of
the file as python code. So the code must be valid python code except for the leading //


### Specifying define statements:

The following specifications are supported:

* define
* path
* expected_errors
* ignore_errors
* expect_errors


// Note. Since this test example include a main file from another
// application it also alters the ANYBODY_PATH_MAINFILEDIR and
// ANYBODY_PATH_MAINFILE preprocessor flags.
//
// If these flags are important to the model they must be mocked by the
// test framework. This can be done by adding the following test directives
// to the top of the test file.


##

//path = {'ANYBODY_PATH_MAINFILEDIR':'../Application/Examples/StandingModel',
//        'ANYBODY_PATH_MAINFILE':'../Application/Examples/StandingModel/StandingModel.Main.any' }
//

*/
